Thu Sep  4 11:19:25 PDT 2014
;Sim_start : add to simulation model
;$SIZES NO=500 LIM6=500
;Sim_end
$PROBLEM    Constant Hazard
$INPUT      ID TIME DV DOSE ICL IV IKA TYPE SMAX SMXH THR CAV CAVH CON
            CNT=DROP CNT2=DROP CNT3=DROP HC=DROP HC2=DROP HC3=DROP FE
            EVID
;ETA1 ETA2 ETA3 ETA4
$DATA       data.csv IGNORE=@
;Sim_start : remove from simulation model
            ACCEPT=(FE.EQ.1) ACCEPT=(TYPE.EQ.1)
;Sim_end
$SUBROUTINE ADVAN=6 TOL=9
$MODEL      COMP=(HAZARD)
$PK

  CL  = ICL
  V   = IV
  KA  = IKA

  BASE = THETA(1)*EXP(ETA(1)) ;the ETA is a placeholder here

$DES
  CP  =DOSE*KA/V/(-KA+CL/V)*(EXP(-KA*T)-EXP(-CL/V*T))
  DADT(1)=BASE    ;hazard

$ERROR
  CONC =DOSE*KA/V/(-KA+CL/V)*(EXP(-KA*TIME)-EXP(-CL/V*TIME))
;----------RTTE Model------------------------------
  IF(NEWIND.NE.2) OLDCHZ=0  ;reset the cumulative hazard
  CHZ = A(1)-OLDCHZ         ;cumulative hazard
                            ;  from previous time point
                            ;  in data set
  OLDCHZ = A(1)             ;rename old cumulative hazard
  SUR = EXP(-CHZ)           ;survival probability

  HAZNOW=BASE               ; rate of event
                            ;  each time pt
                            ;  NB: update with each new model

  IF(DV.EQ.0)   Y=SUR         ;censored event (prob of survival)
  IF(DV.NE.0)   Y=SUR*HAZNOW  ;prob density function of event

  IF(ICALL.EQ.4) THEN ; for simulation
   CALL RANDOM (2,R)
   DV=0
   RTTE = 0
   IF(TIME.EQ.480) RTTE = 1 ; for the censored observation at 480 min
   IF(R.GT.SUR) THEN
      DV=1
      RTTE = 1
   ENDIF
  ENDIF

$THETA  (0,0.00385814) ; BASE
$OMEGA  0  FIX
;Sim_start : add/remove for simulation
;$SIMULATION (5988566) (39978 UNIFORM) ONLYSIM NOPREDICTION SUB=100
$ESTIMATION MAXEVAL=9990 METHOD=0 LIKE PRINT=1 MSFO=msfb51 SIGL=9
            NSIG=3
$COVARIANCE PRINT=E
;Sim_end
$TABLE      ID TIME SUR DOSE EVID NOPRINT ONEHEADER FILE=sdtab51
$TABLE      ID ICL IV IKA NOPRINT ONEHEADER FILE=patab51
$TABLE      ID CAV CAVH CON NOPRINT ONEHEADER FILE=cotab51
$TABLE      ID TYPE SMAX SMXH THR FE NOPRINT ONEHEADER FILE=catab51

NM-TRAN MESSAGES
 WARNINGS AND ERRORS (IF ANY) FOR PROBLEM    1
 (WARNING  2) NM-TRAN INFERS THAT THE DATA ARE POPULATION.
 (WARNING  3) THERE MAY BE AN ERROR IN THE ABBREVIATED CODE. THE FOLLOWING
 ONE OR MORE RANDOM VARIABLES ARE DEFINED WITH "IF" STATEMENTS THAT DO NOT
 PROVIDE DEFINITIONS FOR BOTH THE "THEN" AND "ELSE" CASES. IF ALL
 CONDITIONS FAIL, THE VALUES OF THESE VARIABLES WILL BE ZERO.
   Y
 (WARNING  27) THE ABBREVIATED CODE CONTAINS A SIMULATION BLOCK BUT THERE IS
 NO $SIMULATION RECORD.

1NONLINEAR MIXED EFFECTS MODEL PROGRAM (NONMEM) VERSION 7.3.0
 ORIGINALLY DEVELOPED BY STUART BEAL, LEWIS SHEINER, AND ALISON BOECKMANN
 CURRENT DEVELOPERS ARE ROBERT BAUER, ICON DEVELOPMENT SOLUTIONS,
 AND ALISON BOECKMANN. IMPLEMENTATION, EFFICIENCY, AND STANDARDIZATION
 PERFORMED BY NOUS INFOSYSTEMS.
 PROBLEM NO.:         1
 Constant Hazard
 TOT. NO. OF OBS RECS:       48
 TOT. NO. OF INDIVIDUALS:     48
 GENERAL NONLINEAR KINETICS MODEL (ADVAN6)
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 #TBLN:      1
 #METH: First Order
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
 #TERM:
0MINIMIZATION SUCCESSFUL
 NO. OF FUNCTION EVALUATIONS USED:        9
 NO. OF SIG. DIGITS IN FINAL EST.:  3.4

 #TERE:
 Elapsed estimation time in seconds:     0.05
 Elapsed covariance time in seconds:     0.02

 ********************                                   FIRST ORDER                                  ********************
 #OBJT:**************                       MINIMUM VALUE OF OBJECTIVE FUNCTION                      ********************
 #OBJV:********************************************      511.487       **************************************************

 ********************                                   FIRST ORDER                                  ********************
 ********************                             FINAL PARAMETER ESTIMATE                           ********************

 THETA - VECTOR OF FIXED EFFECTS PARAMETERS   *********
         TH 1
         3.86E-03

 OMEGA - COV MATRIX FOR RANDOM EFFECTS - ETAS  ********
            ETA1
 ETA1
+        0.00E+00

 OMEGA - CORR MATRIX FOR RANDOM EFFECTS - ETAS  *******
            ETA1
 ETA1
+        0.00E+00

 ********************                                   FIRST ORDER                                  ********************
 ********************                            STANDARD ERROR OF ESTIMATE                          ********************

 THETA - VECTOR OF FIXED EFFECTS PARAMETERS   *********
         TH 1
         6.70E-04

 OMEGA - COV MATRIX FOR RANDOM EFFECTS - ETAS  ********
            ETA1
 ETA1
+       .........

 OMEGA - CORR MATRIX FOR RANDOM EFFECTS - ETAS  *******
            ETA1
 ETA1
+       .........

 ********************                                   FIRST ORDER                                  ********************
 ********************                          COVARIANCE MATRIX OF ESTIMATE                         ********************

            TH 1      OM11
 TH 1
+        4.49E-07
 OM11
+       ......... .........

 ********************                                   FIRST ORDER                                  ********************
 ********************                          CORRELATION MATRIX OF ESTIMATE                        ********************

            TH 1      OM11
 TH 1
+        6.70E-04
 OM11
+       ......... .........
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
 ********************                                   FIRST ORDER                                  ********************
 ********************                      EIGENVALUES OF COR MATRIX OF ESTIMATE                     ********************

         1.00E+00
 #CPUT: Total CPU Time in Seconds,        0.131
